// COMSOL Multiphysics 6.1.0.357 model "ME3340_CFD_Michael McCabe.mph"
// Outline of the model tree

Geometry
  geom1 "Geometry 1" (2D, length unit m)
    r1: Rectangle | base = center; size = {.1, .01}
    fin: Finalize "Form Union"

Materials
  mat1: Common "Water, liquid" (disabled) on all domains
    def "Basic"
      thermalexpansioncoefficient = alpha_p(T)
      bulkviscosity = muB(T)
      dynamicviscosity = eta(T)
      ratioofspecificheat = gamma_w(T)
      electricconductivity = 5.5e-6[S/m]
      heatcapacity = Cp(T)
      density = rho(T)
      thermalconductivity = k(T)
      soundspeed = cs(T)
      eta: Piecewise
        arg = T
        pieces = 
          {273.15, 413.15, 1.3799566804-0.021224019151*T^1+1.3604562827E-4*T^2-4.6454090319E-7*T^3+8.9042735735E-10*T^4-9.0790692686E-13*T^5+3.8457331488E-16*T^6}
          {413.15, 553.75, 0.00401235783-2.10746715E-5*T^1+3.85772275E-8*T^2-2.39730284E-11*T^3}
        argunit = K
        fununit = Pa*s
      Cp: Piecewise | arg = T; pieces = {273.15, 553.75, 12010.1471-80.4072879*T^1+0.309866854*T^2-5.38186884E-4*T^3+3.62536437E-7*T^4}; argunit = K; fununit = J/(kg*K)
      rho: Piecewise
        arg = T
        smooth = contd1
        pieces = 
          {273.15, 293.15, 6.3092789034e-05*T^3-0.0603676398829*T^2+18.9229382407066*T-950.704055329848}
          {293.15, 373.15, 1.0335053319e-05*T^3-0.0133950656345*T^2+4.96928883266*T+432.257114008512}
        argunit = K
        fununit = kg/m^3
      k: Piecewise | arg = T; pieces = {273.15, 553.75, -0.869083936+0.00894880345*T^1-1.58366345E-5*T^2+7.97543259E-9*T^3}; argunit = K; fununit = W/(m*K)
      cs: Interpolation | table = {{273, 1403}, {278, 1427}, {283, 1447}, {293, 1481}, {303, 1507}, {313, 1526}, {323, 1541}, {333, 1552}, {343, 1555}, {353, 1555}, {363, 1550}, {373, 1543}}; interp = piecewisecubic; fununit = m/s; argunit = K
      an1: Analytic | funcname = alpha_p; expr = -1/rho(T)*d(rho(T),T); args = T; fununit = 1/K; argunit = K
      an2: Analytic | funcname = gamma_w; expr = 1+(T/Cp(T))*(alpha_p(T)*cs(T))^2; args = T; fununit = 1; argunit = K
      an3: Analytic | funcname = muB; expr = 2.79*eta(T); args = T; fununit = Pa*s; argunit = K
  mat2: Common "Air" (disabled) on domains 1
    def "Basic"
      thermalexpansioncoefficient = alpha_p(pA,T)
      molarmass = 0.02897[kg/mol]
      bulkviscosity = muB(T)
      relpermeability = 1
      relpermittivity = 1
      dynamicviscosity = eta(T)
      ratioofspecificheat = 1.4
      electricconductivity = 0[S/m]
      heatcapacity = Cp(T)
      density = rho(pA,T)
      thermalconductivity = k(T)
      soundspeed = cs(T)
      eta: Piecewise | arg = T; pieces = {200.0, 1600.0, -8.38278E-7+8.35717342E-8*T^1-7.69429583E-11*T^2+4.6437266E-14*T^3-1.06585607E-17*T^4}; argunit = K; fununit = Pa*s
      Cp: Piecewise | arg = T; pieces = {200.0, 1600.0, 1047.63657-0.372589265*T^1+9.45304214E-4*T^2-6.02409443E-7*T^3+1.2858961E-10*T^4}; argunit = K; fununit = J/(kg*K)
      rho: Analytic | expr = pA*0.02897/R_const[K*mol/J]/T; args = {pA, T}; fununit = kg/m^3; argunit = {Pa, K}
      k: Piecewise | arg = T; pieces = {200.0, 1600.0, -0.00227583562+1.15480022E-4*T^1-7.90252856E-8*T^2+4.11702505E-11*T^3-7.43864331E-15*T^4}; argunit = K; fununit = W/(m*K)
      cs: Analytic | expr = sqrt(1.4*R_const[K*mol/J]/0.02897*T); args = T; fununit = m/s; argunit = K
      an1: Analytic | funcname = alpha_p; expr = -1/rho(pA,T)*d(rho(pA,T),T); args = {pA, T}; fununit = 1/K; argunit = {Pa, K}
      an2: Analytic "Analytic 2a" | funcname = muB; expr = 0.6*eta(T); args = T; fununit = Pa*s; argunit = K
    RefractiveIndex
      n = 1
      ki = 0
    NonlinearModel
      BA = (def.gamma+1)/2
    idealGas
      Rs = R_const/Mn
      heatcapacity = Cp(T)
      ratioofspecificheat = 1.4
      molarmass = 0.02897
      Cp: Piecewise | arg = T; pieces = {200.0, 1600.0, 1047.63657-0.372589265*T^1+9.45304214E-4*T^2-6.02409443E-7*T^3+1.2858961E-10*T^4}; argunit = K; fununit = J/(kg*K)
  mat3: Common "Engine oil" (disabled) on domains 1
    def "Basic"
      dynamicviscosity = eta(T)
      heatcapacity = Cp(T)
      density = rho(T)
      thermalconductivity = k(T)
      eta: Piecewise
        arg = T
        pieces = 
          {273.0, 353.0, 42669.28688622-741.1718801282*T^1+5.360521287088*T^2-0.0206602767616*T^3+4.47491538052E-5*T^4-5.164053479202E-8*T^5+2.48033770504E-11*T^6}
          {353.0, 433.0, 4.94593941-0.0351869631*T^1+8.37935977E-5*T^2-6.67125E-8*T^3}
        argunit = K
        fununit = Pa*s
      Cp: Piecewise | arg = T; pieces = {273.0, 433.0, 761.405625+3.47685606*T^1+0.00115530303*T^2}; argunit = K; fununit = J/(kg*K)
      rho: Piecewise | arg = T; pieces = {273.0, 433.0, 1068.70404-0.6393421*T^1+7.34307359E-5*T^2}; argunit = K; fununit = kg/m^3
      k: Piecewise | arg = T; pieces = {273.0, 433.0, 0.192223542-2.0637987E-4*T^1+1.54220779E-7*T^2}; argunit = K; fununit = W/(m*K)
  mat4: Common "Hydrogen" (disabled) on domains 1
    def "Basic"
      dynamicviscosity = eta(T)
      ratioofspecificheat = 1.41
      heatcapacity = Cp(T)
      density = rho(pA,T)
      thermalconductivity = k(T)
      eta: Piecewise | arg = T; pieces = {200.0, 1300.0, 2.14524642E-6+2.54245E-8*T^1-1.0235587E-11*T^2+2.80895021E-15*T^3}; argunit = K; fununit = Pa*s
      Cp: Piecewise | arg = T; pieces = {200.0, 1300.0, 10808.501+21.5799904*T^1-0.0444720318*T^2+3.85401176E-5*T^3-1.14979447E-8*T^4}; argunit = K; fununit = J/(kg*K)
      rho: Analytic | expr = pA*0.002016/R_const[K*mol/J]/T; args = {pA, T}; dermethod = manual; argders = {{pA, d(pA*0.002016/R_const/T,pA)}, {T, d(pA*0.002016/R_const/T,T)}}; fununit = kg/m^3; argunit = {Pa, K}
      k: Piecewise | arg = T; pieces = {200.0, 1300.0, 0.00517975922+6.72778E-4*T^1-3.0388973E-7*T^2+6.58874687E-11*T^3}; argunit = K; fununit = W/(m*K)
    idealGas
      Rs = R_const/Mn
      heatcapacity = Cp(T)
      ratioofspecificheat = 1.41
      molarmass = 0.0020
      Cp: Piecewise | arg = T; pieces = {200.0, 1300.0, 10808.501+21.5799904*T^1-0.0444720318*T^2+3.85401176E-5*T^3-1.14979447E-8*T^4}; argunit = K; fununit = J/(kg*K)
  mat5: Common "Mercury" on domains 1
    def "Basic"
      dynamicviscosity = eta(T)
      heatcapacity = Cp(T)
      density = rho(T)
      thermalconductivity = k(T)
      eta: Piecewise | arg = T; pieces = {273.15, 588.65, 0.0230467338-2.38424578E-4*T^1+1.07560625E-6*T^2-2.47213483E-9*T^3+2.85751639E-12*T^4-1.32134881E-15*T^5}; argunit = K; fununit = Pa*s
      Cp: Piecewise | arg = T; pieces = {273.15, 588.65, 134.717588+0.176002557*T^1-0.00103964794*T^2+2.11979868E-6*T^3-1.46959249E-9*T^4}; argunit = K; fununit = J/(kg*K)
      rho: Piecewise | arg = T; pieces = {273.15, 588.65, 14298.6722-2.44897958*T^1}; argunit = K; fununit = kg/m^3
      k: Piecewise | arg = T; pieces = {273.15, 588.65, -2.03830051+0.0505602593*T^1-5.54448869E-5*T^2+2.69610068E-8*T^3}; argunit = K; fununit = W/(m*K)

Physics
  spf: LaminarFlow on all domains
    dependent variable u = {u, v, w}
    ShapeProperty.order_fluid = 2
    fp1: FluidProperties (default)
    init1: init "Initial Values 1" (default)
    wallbc1: WallBC "Upper Wall" (default)
      utr = {.1, 0, 0}
      SlidingWall = 0
      TranslationalVelocityOption = ZeroFixedWall
    inl1: InletBoundary "Inlet 1" on boundaries 1 | BoundaryCondition = Pressure; p0 = 1
    out1: OutletBoundary "Outlet 1" on boundaries 4 | BoundaryCondition = FullyDevelopedFlow
    wallbc2: WallBC "Moving Upper Wall - Disabled" (disabled) on boundaries 3
      utr = {.1, 0, 0}
      SlidingWall = 0
      TranslationalVelocityOption = Manual

Mesh
  mesh1 "Mesh 1" (physics-controlled)
    size: MeshSizeDefault | table = cfd; hauto = 6

Studies
  std1 "Study 1"
    stat: Stationary

Solver configurations
  sol1 "Solution 1" (study std1)
    v1: Variables "Dependent Variables 1"
    s1: Stationary "Stationary Solver 1"
      fc1: FullyCoupled | linsolver = d1; initstep = 0.01; maxiter = 100
      d1: Direct "Direct, fluid flow variables (spf)" | linsolver = pardiso; pivotperturb = 1.0E-13

Datasets
  dset1: Solution | solution = sol1

Plots
  pg1: PlotGroup2D "Velocity (spf)" | data = dset1
    surf1: Surface | expr = spf.U
  pg2: PlotGroup2D "Pressure (spf)" | data = dset1
    con1: Contour | expr = p; levelrounding = off
  pg3: PlotGroup1D "1D Plot Group 3" | data = dset1; xlabel = Velocity (m/s); ylabel = Y-Coordinate (m); switchxy = on
    lngr1: LineGraph on boundaries 4
      expr = spf.U
      title = Velocity at Given Y-Coordinate
      xdata = expr
      xdataexpr = y
      legends = Computational
    lngr2: LineGraph on boundaries 4
      data = dset1
      expr = (1/(2*spf.mu))*(spf.out1.pAverage-spf.inl1.pAverage/.1)*((y)^2-(.005)^2)
      xdata = expr
      xdataexpr = y
      legends = Analytical